# OpenSim document version 40000
InverseKinematicsTool:
  results_directory: ./
  model_file: "C:\Users\Jeremias\anaconda3\envs\Pose2Sim\Lib\site-packages\Pose2Sim\RMTPoseL\RMTPoseL\ROM2\3c\23087_29092_29913\Model_Pose2Sim_Halpe26_new_download_scaled_markers_moved.osim"
  constraint_weight: Inf
  accuracy: 1e-5
  time_range: 0.01666667 1.666667
  output_motion_file: E:\Uni\HoT\pose-3dgait1Hot\gait1Hot_0_245_halpe26.mot
  report_errors: true
  marker_file: E:\Uni\HoT\pose-3dgait1Hot\gait1Hot_0-245.trc
  report_marker_locations: false
  IKTaskSet:
    IKMarkerTask Nose: apply=true weight=0.5
    IKMarkerTask Head: apply=true weight=0.5
    IKMarkerTask Neck: apply=true weight=0.2
    IKMarkerTask LShoulder: apply=true weight=2
    IKMarkerTask RShoulder: apply=true weight=2
    IKMarkerTask LElbow: apply=true weight=1
    IKMarkerTask RElbow: apply=true weight=1
    IKMarkerTask LWrist: apply=true weight=1
    IKMarkerTask RWrist: apply=true weight=1
    IKMarkerTask Hip: apply=true weight=1
    IKMarkerTask LHip: apply=true weight=2
    IKMarkerTask RHip: apply=true weight=2
    IKMarkerTask LKnee: apply=true weight=1
    IKMarkerTask RKnee: apply=true weight=1
    IKMarkerTask LAnkle: apply=true weight=1
    IKMarkerTask RAnkle: apply=true weight=1
    IKMarkerTask LHeel: apply=true weight=1
    IKMarkerTask LSmallToe: apply=true weight=1
    IKMarkerTask LBigToe: apply=true weight=1
    IKMarkerTask RHeel: apply=true weight=1
    IKMarkerTask RSmallToe: apply=true weight=1
    IKMarkerTask RBigToe: apply=true weight=1
    IKMarkerTask Lumbar5: apply=true weight=0.2
    IKMarkerTask Lumbar4: apply=true weight=0.2
    IKMarkerTask Lumbar3: apply=true weight=0.2
    IKMarkerTask Lumbar2: apply=true weight=0.2
    IKMarkerTask Lumbar1: apply=true weight=0.2
    IKMarkerTask Thoracic12: apply=true weight=0.1
    IKMarkerTask Thoracic11: apply=true weight=0.1
    IKMarkerTask Thoracic10: apply=true weight=0.1
    IKMarkerTask Thoracic9: apply=true weight=0.1
    IKMarkerTask Thoracic8: apply=true weight=0.1
    IKMarkerTask Thoracic7: apply=true weight=0.1
    IKMarkerTask Thoracic6: apply=true weight=0.1
    IKMarkerTask Thoracic5: apply=true weight=0.1
    IKMarkerTask Thoracic4: apply=true weight=0.1
    IKMarkerTask Thoracic3: apply=true weight=0.1
    IKMarkerTask Thoracic2: apply=true weight=0.1
    IKMarkerTask Thoracic1: apply=true weight=0.1
    IKCoordinateTask L5_S1_Flex_Ext: apply=true weight=1 value_type=default_value value=0
