# OpenSim document version 40600
Model Pose2Sim_AlphaPose:
  gravity: 0 -9.80665 0
  length_units: meters
  force_units: N
  credits:
    Full-body model adapted from Beaucage-Gauvreau et al., with Rajagopal et al. knee angles. AlphaPose Halpe_26 markers. No muscles included. Free pelvis translation, added ball joint between head and torso, locked arm pronation/supination, clamped hip flexion to 150° instead of 120°, hip adduction -60° instead of -50°, hip rotation -70° instead of -40°, knee 155° instead of 120°.
  publications:
    Pagnon, D., Domalain, M., Reveret, L. (2021). Pose2Sim: An End-to-End Workflow for 3D Markerless Sports Kinematics—Part 1: Robustness. Sensors, 21(19), 6530.
  Ground
  BodySet:
    Body pelvis: mass=11.777 [kg] mass_center=(-0.0707 0 0) inertia=(0.1028 0.0871 0.0579 0 0 0)
        meshes=(r_pelvis.vtp l_pelvis.vtp)
    Body sacrum: mass=0 mass_center=(0 0 0) inertia=(0 0 0 0 0 0) meshes=sacrum.vtp
    Body femur_r: mass=9.3014 mass_center=(0 -0.17 0) inertia=(0.1339 0.0351 0.1412 0 0 0) meshes=femur_r.vtp
    Body patella_r: mass=0.0862 mass_center=(0.0018 0.0264 0) inertia=(2.87e-6 1.311e-5 1.311e-5 0 0 0)
        meshes=r_patella.vtp
    Body tibia_r: mass=3.7075 mass_center=(0 -0.1867 0) inertia=(0.0504 0.0051 0.0511 0 0 0)
        meshes=(tibia_r.vtp fibula_r.vtp)
    Body talus_r: mass=0.1 mass_center=(0 0 0) inertia=(0.001 0.001 0.001 0 0 0) meshes=talus_rv.vtp
    Body calcn_r: mass=1.25 mass_center=(0.1 0.03 0) inertia=(0.0014 0.0039 0.0041 0 0 0) meshes=foot.vtp
    Body toes_r: mass=0.2166 mass_center=(0.0346 0.006 -0.0175) inertia=(0.0001 0.0002 0.001 0 0 0) meshes=bofoot.vtp
    Body femur_l: mass=9.3014 mass_center=(0 -0.17 0) inertia=(0.1339 0.0351 0.1412 0 0 0) meshes=femur_l.vtp
    Body patella_l: mass=0.0862 mass_center=(0.0018 0.0264 0) inertia=(2.87e-6 1.311e-5 1.311e-5 0 0 0)
        meshes=l_patella.vtp
    Body tibia_l: mass=3.7075 mass_center=(0 -0.1867 0) inertia=(0.0504 0.0051 0.0511 0 0 0)
        meshes=(tibia_l.vtp fibula_l.vtp)
    Body talus_l: mass=0.1 mass_center=(0 0 0) inertia=(0.001 0.001 0.001 0 0 0) meshes=talus_lv.vtp
    Body calcn_l: mass=1.25 mass_center=(0.1 0.03 0) inertia=(0.0014 0.0039 0.0041 0 0 0) meshes=l_foot.vtp
    Body toes_l: mass=0.2166 mass_center=(0.0346 0.006 0.0175) inertia=(0.0001 0.0002 0.001 0 0 0) meshes=l_bofoot.vtp
    Body lumbar5: mass=1.824 mass_center=(0.01728 0.0183 0) inertia=(0.178216 0.0217274 0.171486 0 0 0)
        meshes=lumbar5.vtp
    Body lumbar4: mass=1.799 mass_center=(0.0186 0.0217953 0) inertia=(0.171208 0.0206792 0.165178 0 0 0)
        meshes=lumbar4.vtp
    Body lumbar3: mass=1.67 mass_center=(0.0178939 0.0232739 0) inertia=(0.157697 0.0199107 0.152447 0 0 0)
        meshes=lumbar3.vtp
    Body lumbar2: mass=1.689 mass_center=(0.0252462 0.0202124 0) inertia=(0.162705 0.0219751 0.157705 0 0 0)
        meshes=lumbar2.vtp
    Body lumbar1: mass=1.677 mass_center=(0.03274 0.0194073 0.00132891) inertia=(0.162657 0.0241312 0.157927 0 0 0)
        meshes=lumbar1.vtp
    Body thoracic12: mass=1.9864 mass_center=(0.0521765 -0.00207232 0) inertia=(0.127798 0.209103 0.0697395 0 0 0)
        meshes=thoracic12_s.vtp
    Body thoracic11: mass=1.6049 mass_center=(0.0564797 -0.00142132 0) inertia=(0.104667 0.175795 0.0711274 0 0 0)
        meshes=thoracic11_s.vtp
    Body thoracic10: mass=1.549 mass_center=(0.0604203 0.00275905 0) inertia=(0.102932 0.17325 0.0703178 0 0 0)
        meshes=thoracic10_s.vtp
    Body thoracic9: mass=1.3016 mass_center=(0.0643355 0.00466918 0) inertia=(0.0830398 0.136935 0.0538949 0 0 0)
        meshes=thoracic9_s.vtp
    Body thoracic8: mass=1.2259 mass_center=(0.059938 0.0102116 0) inertia=(0.0838494 0.134737 0.0508879 0 0 0)
        meshes=thoracic8_s.vtp
    Body thoracic7: mass=1.266 mass_center=(0.0556167 0.0168529 0) inertia=(0.0859311 0.133234 0.0471869 0 0 0)
        meshes=thoracic7_s.vtp
    Body thoracic6: mass=1.1356 mass_center=(0.0511811 0.021861 0) inertia=(0.0902103 0.134737 0.0445269 0 0 0)
        meshes=thoracic6_s.vtp
    Body thoracic5: mass=1.168 mass_center=(0.0443324 0.0258505 0) inertia=(0.0927547 0.133349 0.0405947 0 0 0)
        meshes=thoracic5_s.vtp
    Body thoracic4: mass=1.0469 mass_center=(0.0363922 0.0269448 0) inertia=(0.0959931 0.134737 0.0387442 0 0 0)
        meshes=thoracic4_s.vtp
    Body thoracic3: mass=1.1314 mass_center=(0.0244422 0.0230274 0) inertia=(0.0968026 0.133118 0.0363154 0 0 0)
        meshes=thoracic3_s.vtp
    Body thoracic2: mass=0.9492 mass_center=(0.0187755 0.0205432 0) inertia=(0.0778353 0.104898 0.0271788 0 0 0)
        meshes=thoracic2_s.vtp
    Body thoracic1: mass=0.89347 mass_center=(0.00444495 0.0146739 0) inertia=(0.0774884 0.100851 0.0233622 0 0 0)
        meshes=thoracic1_s.vtp
    Body torso: mass=22.53 mass_center=(0.0162326 0.1802259 0) inertia=(1.366196 0.7000077 1.326262 0 0 0)
        meshes=(cerv1sm.vtp cerv2sm.vtp cerv3sm.vtp cerv4sm.vtp cerv5sm.vtp cerv6sm.vtp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)
      WrapCylinder Cylinder: translation=(-0.208 0.04 0) quadrant=all radius=0.17 length=0.26
      WrapEllipsoid Chest_r: xyz_body_rotation=(0 -0.4 0.2) translation=(0 0.21 0.01) quadrant=z
          dimensions=(0.075 0.17 0.13)
      WrapEllipsoid Chest_l: xyz_body_rotation=(0 0.4 0.2) translation=(0 0.21 -0.01) quadrant=-z
          dimensions=(0.075 0.17 0.13)
    Body head: mass=4.2778 mass_center=(0.01606673 0.05850891 0) inertia=(0.01149092 0.008314703 0.01253026 0 0 0)
        meshes=(hat_jaw.vtp hat_skull.vtp)
    Body Abdomen: mass=0.001 mass_center=(0.008 0 0) inertia=(1.78e-6 5.8e-7 1.36e-6 0 0 0)
      WrapEllipsoid Abdomen: translation=(0 0 0) quadrant=x dimensions=(0.01 0.08 0.05)
    Body humerus_r: mass=2.0325 mass_center=(0 -0.164502 0) inertia=(0.011946 0.004121 0.013409 0 0 0)
        meshes=humerus_rv.vtp
    Body ulna_r: mass=0.6075 mass_center=(0 -0.120525 0) inertia=(0.002962 0.000618 0.003213 0 0 0) meshes=ulna_rv.vtp
    Body radius_r: mass=0.6075 mass_center=(0 -0.120525 0) inertia=(0.002962 0.000618 0.003213 0 0 0)
        meshes=radius_rv.vtp
    Body hand_r: mass=0.4575 mass_center=(0 -0.068095 0) inertia=(0.000892 0.000547 0.00134 0 0 0)
        meshes=(pisiform_rvs.vtp lunate_rvs.vtp scaphoid_rvs.vtp triquetrum_rvs.vtp hamate_rvs.vtp capitate_rvs.vtp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)
    Body humerus_l: mass=2.0325 mass_center=(0 -0.164502 0) inertia=(0.011946 0.004121 0.013409 0 0 0)
        meshes=humerus_lv.vtp
    Body ulna_l: mass=0.6075 mass_center=(0 -0.120525 0) inertia=(0.002962 0.000618 0.003213 0 0 0) meshes=ulna_lv.vtp
    Body radius_l: mass=0.6075 mass_center=(0 -0.120525 0) inertia=(0.002962 0.000618 0.003213 0 0 0)
        meshes=radius_lv.vtp
    Body hand_l: mass=0.4575 mass_center=(0 -0.068095 0) inertia=(0.000892 0.000547 0.00134 0 0 0)
        meshes=(pisiform_lvs.vtp lunate_lvs.vtp scaphoid_lvs.vtp triquetrum_lvs.vtp hamate_lvs.vtp capitate_lvs.vtp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)
  JointSet:
    CustomJoint ground_pelvis: socket_parent_frame=ground_offset socket_child_frame=pelvis_offset
      Coordinate pelvis_tilt: default_value=0 range=(-1.570796 1.570796) clamped=false
      Coordinate pelvis_list: default_value=0 range=(-1.570796 1.570796) clamped=false
      Coordinate pelvis_rotation: default_value=0 range=(-1.570796 1.570796) clamped=false
      Coordinate pelvis_tx: default_value=0 range=(-5 5) clamped=false
      Coordinate pelvis_ty: default_value=0.94 range=(-1 2) clamped=false
      Coordinate pelvis_tz: default_value=0 range=(-3 3) clamped=false
      PhysicalOffsetFrame ground_offset: socket_parent=/ground translation=(0 0 0) [meters]
          orientation=(0 0 0.01331184) [radians]
      PhysicalOffsetFrame pelvis_offset: socket_parent=/bodyset/pelvis translation=(-0.0755911 -0.07464621 0)
      SpatialTransform:
        TransformAxis rotation1: coordinates=pelvis_tilt axis=(0 0 1) LinearFunction(coefficients=1 0)
        TransformAxis rotation2: coordinates=pelvis_list axis=(1 0 0) LinearFunction(coefficients=1 0)
        TransformAxis rotation3: coordinates=pelvis_rotation axis=(0 1 0) LinearFunction(coefficients=1 0)
        TransformAxis translation1: coordinates=pelvis_tx axis=(1 0 0) LinearFunction(coefficients=1 0)
        TransformAxis translation2: coordinates=pelvis_ty axis=(0 1 0) LinearFunction(coefficients=1 0)
        TransformAxis translation3: coordinates=pelvis_tz axis=(0 0 1) LinearFunction(coefficients=1 0)
    WeldJoint sacrumjnt: socket_parent_frame=pelvis_offset socket_child_frame=sacrum_offset
      PhysicalOffsetFrame pelvis_offset: socket_parent=/bodyset/pelvis translation=(0.01 -0.017 0)
      PhysicalOffsetFrame sacrum_offset: socket_parent=/bodyset/sacrum translation=(0 0 0)
    CustomJoint hip_r: socket_parent_frame=pelvis_offset socket_child_frame=femur_r_offset
      Coordinate hip_flexion_r: default_value=1.567005e-9 range=(-0.87 2.61799) clamped=true
      Coordinate hip_adduction_r: default_value=-9.463479e-10 range=(-1.047198 0.5235988) clamped=true
      Coordinate hip_rotation_r: default_value=0 range=(-1.22173 0.6981317) clamped=true
      PhysicalOffsetFrame pelvis_offset: socket_parent=/bodyset/pelvis translation=(-0.0707 -0.0661 0.0835)
      PhysicalOffsetFrame femur_r_offset: socket_parent=/bodyset/femur_r translation=(0 0 0)
      SpatialTransform: axes_held_at_zero=(translation1 translation2 translation3)
        TransformAxis rotation1: coordinates=hip_flexion_r axis=(0 0 1) LinearFunction(coefficients=1 0)
        TransformAxis rotation2: coordinates=hip_adduction_r axis=(1 0 0) LinearFunction(coefficients=1 0)
        TransformAxis rotation3: coordinates=hip_rotation_r axis=(0 1 0) LinearFunction(coefficients=1 0)
    CustomJoint walker_knee_r: socket_parent_frame=femur_r_offset socket_child_frame=tibia_r_offset
      Coordinate knee_angle_r: default_value=7.691617e-5 range=(0 2.70526) clamped=true
      PhysicalOffsetFrame femur_r_offset: socket_parent=/bodyset/femur_r translation=(-0.00809 -0.40796 -0.00275)
          orientation=(-1.64157 1.44618 1.5708)
      PhysicalOffsetFrame tibia_r_offset: socket_parent=/bodyset/tibia_r
          translation=(-0.00808954 -0.0105348 -0.00148474) orientation=(-1.64157 1.44618 1.5708)
      SpatialTransform: axes_held_at_zero=translation3
        TransformAxis rotation1: coordinates=knee_angle_r axis=(1 0 0) LinearFunction(coefficients=1 0)
        TransformAxis rotation2: coordinates=knee_angle_r axis=(0 0 1)
          SimmSpline: x=(0 0.174533 0.349066 0.523599 0.698132 0.872665 1.0472 1.22173 1.39626 1.5708 1.74533 1.91986 2.0944)
              y=(0 0.0126809 0.0226969 0.0296054 0.0332049 0.0335354 0.0308779 0.0257548 0.0189295 0.011407 0.00443314 -0.00050475 -0.0016782)
        TransformAxis rotation3: coordinates=knee_angle_r axis=(0 1 0)
          SimmSpline: x=(0 0.174533 0.349066 0.523599 0.698132 0.872665 1.0472 1.22173 1.39626 1.5708 1.74533 1.91986 2.0944)
              y=(0 0.059461 0.109399 0.150618 0.18392 0.210107 0.229983 0.24435 0.254012 0.25977 0.262428 0.262788 0.261654)
        TransformAxis translation1: coordinates=knee_angle_r axis=(0 1 0)
          SimmSpline: x=(0 0.174533 0.349066 0.523599 0.698132 0.872665 1.0472 1.22173 1.39626 1.5708 1.74533 1.91986 2.0944)
              y=(0 0.000479 0.000835 0.001086 0.001251 0.001346 0.001391 0.001403 0.0014 0.0014 0.001421 0.001481 0.001599)
        TransformAxis translation2: coordinates=knee_angle_r axis=(0 0 1)
          SimmSpline: x=(0 0.174533 0.349066 0.523599 0.698132 0.872665 1.0472 1.22173 1.39626 1.5708 1.74533 1.91986 2.0944)
              y=(0 0.000988 0.001899 0.002734 0.003492 0.004173 0.004777 0.005305 0.005756 0.00613 0.006427 0.006648 0.006792)
    CustomJoint patellofemoral_r: socket_parent_frame=femur_r_offset socket_child_frame=patella_r_offset
      Coordinate knee_angle_r_beta: default_value=7.691617e-5 range=(-99999.9 99999.9) clamped=false
      PhysicalOffsetFrame femur_r_offset: socket_parent=/bodyset/femur_r translation=(-0.00809 -0.40796 -0.00275)
      PhysicalOffsetFrame patella_r_offset: socket_parent=/bodyset/patella_r translation=(0 0 0)
      SpatialTransform: axes_held_at_zero=(rotation2 rotation3)
        TransformAxis rotation1: coordinates=knee_angle_r_beta axis=(0 0 1)
          SimmSpline: x=(0 0.174533 0.349066 0.523599 0.698132 0.872665 1.0472 1.22173 1.39626 1.5708 1.74533 1.91986 2.0944)
              y=(0.00113686 -0.00629212 -0.105582 -0.253683 -0.414245 -0.579047 -0.747244 -0.91799 -1.09044 -1.26379 -1.43763 -1.61186 -1.78634)
        TransformAxis translation1: coordinates=knee_angle_r_beta axis=(1 0 0)
          SimmSpline: x=(0 0.174533 0.349066 0.523599 0.698132 0.872665 1.0472 1.22173 1.39626 1.5708 1.74533 1.91986 2.0944)
              y=(0.0524 0.0488 0.0437 0.0371 0.0296 0.0216 0.0136 0.0057 -0.0019 -0.0088 -0.0148 -0.0196 -0.0227)
        TransformAxis translation2: coordinates=knee_angle_r_beta axis=(0 1 0)
          SimmSpline: x=(0 0.174533 0.349066 0.523599 0.698132 0.872665 1.0472 1.22173 1.39626 1.5708 1.74533 1.91986 2.0944)
              y=(-0.0108 -0.019 -0.0263 -0.0322 -0.0367 -0.0395 -0.0408 -0.0404 -0.0384 -0.0349 -0.0301 -0.0245 -0.0187)
        TransformAxis translation3: axis=(0 0 1) Constant(value=0.00275)
    CustomJoint ankle_r: socket_parent_frame=tibia_r_offset socket_child_frame=talus_r_offset
      Coordinate ankle_angle_r: default_value=0 range=(-1.047198 1.047198) clamped=false
      PhysicalOffsetFrame tibia_r_offset: socket_parent=/bodyset/tibia_r translation=(0 -0.43 0)
      PhysicalOffsetFrame talus_r_offset: socket_parent=/bodyset/talus_r translation=(0 0 0)
      SpatialTransform: axes_held_at_zero=(rotation2 rotation3 translation1 translation2 translation3)
        TransformAxis rotation1: coordinates=ankle_angle_r axis=(-0.1050135 -0.1740224 0.9791263)
            LinearFunction(coefficients=1 0)
    PinJoint subtalar_r: socket_parent_frame=talus_r_offset socket_child_frame=calcn_r_offset
      Coordinate subtalar_angle_r: default_value=0 range=(-0.3490659 0.3490659) clamped=true
      PhysicalOffsetFrame talus_r_offset: socket_parent=/bodyset/talus_r translation=(-0.04877 -0.04195 0.00792)
          orientation=(-1.76819 0.906223 1.8196)
      PhysicalOffsetFrame calcn_r_offset: socket_parent=/bodyset/calcn_r translation=(0 0 0)
          orientation=(-1.76819 0.906223 1.8196)
    PinJoint mtp_r: socket_parent_frame=calcn_r_offset socket_child_frame=toes_r_offset
      Coordinate mtp_angle_r: default_value=0 range=(-0.5235988 0.5235988) clamped=true locked=true
      PhysicalOffsetFrame calcn_r_offset: socket_parent=/bodyset/calcn_r translation=(0.1788 -0.002 0.00108)
          orientation=(-3.14159 0.619901 0)
      PhysicalOffsetFrame toes_r_offset: socket_parent=/bodyset/toes_r translation=(0 0 0)
          orientation=(-3.14159 0.619901 0)
    CustomJoint hip_l: socket_parent_frame=pelvis_offset socket_child_frame=femur_l_offset
      Coordinate hip_flexion_l: default_value=1.567005e-9 range=(-0.87 2.61799) clamped=true
      Coordinate hip_adduction_l: default_value=-9.463479e-10 range=(-1.047198 0.5235988) clamped=true
      Coordinate hip_rotation_l: default_value=0 range=(-1.22173 0.6981317) clamped=true
      PhysicalOffsetFrame pelvis_offset: socket_parent=/bodyset/pelvis translation=(-0.0707 -0.0661 -0.0835)
      PhysicalOffsetFrame femur_l_offset: socket_parent=/bodyset/femur_l translation=(0 0 0)
      SpatialTransform: axes_held_at_zero=(translation1 translation2 translation3)
        TransformAxis rotation1: coordinates=hip_flexion_l axis=(0 0 1) LinearFunction(coefficients=1 0)
        TransformAxis rotation2: coordinates=hip_adduction_l axis=(1 0 0) LinearFunction(coefficients=-1 0)
        TransformAxis rotation3: coordinates=hip_rotation_l axis=(0 1 0) LinearFunction(coefficients=-1 0)
    CustomJoint walker_knee_l: socket_parent_frame=femur_l_offset socket_child_frame=tibia_l_offset
      Coordinate knee_angle_l: default_value=7.691617e-5 range=(0 2.70526) clamped=true
      PhysicalOffsetFrame femur_l_offset: socket_parent=/bodyset/femur_l translation=(-0.00809 -0.40796 0.00275)
          orientation=(1.64157 -1.44618 1.5708)
      PhysicalOffsetFrame tibia_l_offset: socket_parent=/bodyset/tibia_l
          translation=(-0.00808954 -0.0105348 0.00148474) orientation=(1.64157 -1.44618 1.5708)
      SpatialTransform: axes_held_at_zero=translation3
        TransformAxis rotation1: coordinates=knee_angle_l axis=(-1 0 0) LinearFunction(coefficients=1 0)
        TransformAxis rotation2: coordinates=knee_angle_l axis=(0 0 1)
          SimmSpline: x=(0 0.174533 0.349066 0.523599 0.698132 0.872665 1.0472 1.22173 1.39626 1.5708 1.74533 1.91986 2.0944)
              y=(0 0.0126809 0.0226969 0.0296054 0.0332049 0.0335354 0.0308779 0.0257548 0.0189295 0.011407 0.00443314 -0.00050475 -0.0016782)
        TransformAxis rotation3: coordinates=knee_angle_l axis=(0 1 0)
          SimmSpline: x=(0 0.174533 0.349066 0.523599 0.698132 0.872665 1.0472 1.22173 1.39626 1.5708 1.74533 1.91986 2.0944)
              y=(0 -0.059461 -0.109399 -0.150618 -0.18392 -0.210107 -0.229983 -0.24435 -0.254012 -0.25977 -0.262428 -0.262788 -0.261654)
        TransformAxis translation1: coordinates=knee_angle_l axis=(0 1 0)
          SimmSpline: x=(0 0.174533 0.349066 0.523599 0.698132 0.872665 1.0472 1.22173 1.39626 1.5708 1.74533 1.91986 2.0944)
              y=(0 0.000479 0.000835 0.001086 0.001251 0.001346 0.001391 0.001403 0.0014 0.0014 0.001421 0.001481 0.001599)
        TransformAxis translation2: coordinates=knee_angle_l axis=(0 0 1)
          SimmSpline: x=(0 0.174533 0.349066 0.523599 0.698132 0.872665 1.0472 1.22173 1.39626 1.5708 1.74533 1.91986 2.0944)
              y=(0 -0.000988 -0.001899 -0.002734 -0.003492 -0.004173 -0.004777 -0.005305 -0.005756 -0.00613 -0.006427 -0.006648 -0.006792)
    CustomJoint patellofemoral_l: socket_parent_frame=femur_l_offset socket_child_frame=patella_l_offset
      Coordinate knee_angle_l_beta: default_value=7.691617e-5 range=(-99999.9 99999.9) clamped=false
      PhysicalOffsetFrame femur_l_offset: socket_parent=/bodyset/femur_l translation=(-0.00809 -0.40796 0.00275)
      PhysicalOffsetFrame patella_l_offset: socket_parent=/bodyset/patella_l translation=(0 0 0)
      SpatialTransform: axes_held_at_zero=(rotation2 rotation3)
        TransformAxis rotation1: coordinates=knee_angle_l_beta axis=(0 0 1)
          SimmSpline: x=(0 0.174533 0.349066 0.523599 0.698132 0.872665 1.0472 1.22173 1.39626 1.5708 1.74533 1.91986 2.0944)
              y=(0.00113686 -0.00629212 -0.105582 -0.253683 -0.414245 -0.579047 -0.747244 -0.91799 -1.09044 -1.26379 -1.43763 -1.61186 -1.78634)
        TransformAxis translation1: coordinates=knee_angle_l_beta axis=(1 0 0)
          SimmSpline: x=(0 0.174533 0.349066 0.523599 0.698132 0.872665 1.0472 1.22173 1.39626 1.5708 1.74533 1.91986 2.0944)
              y=(0.0524 0.0488 0.0437 0.0371 0.0296 0.0216 0.0136 0.0057 -0.0019 -0.0088 -0.0148 -0.0196 -0.0227)
        TransformAxis translation2: coordinates=knee_angle_l_beta axis=(0 1 0)
          SimmSpline: x=(0 0.174533 0.349066 0.523599 0.698132 0.872665 1.0472 1.22173 1.39626 1.5708 1.74533 1.91986 2.0944)
              y=(-0.0108 -0.019 -0.0263 -0.0322 -0.0367 -0.0395 -0.0408 -0.0404 -0.0384 -0.0349 -0.0301 -0.0245 -0.0187)
        TransformAxis translation3: axis=(0 0 1) Constant(value=-0.00275)
    CustomJoint ankle_l: socket_parent_frame=tibia_l_offset socket_child_frame=talus_l_offset
      Coordinate ankle_angle_l: default_value=0 range=(-1.047198 1.047198) clamped=true
      PhysicalOffsetFrame tibia_l_offset: socket_parent=/bodyset/tibia_l translation=(0 -0.43 0)
      PhysicalOffsetFrame talus_l_offset: socket_parent=/bodyset/talus_l translation=(0 0 0)
      SpatialTransform: axes_held_at_zero=(rotation2 rotation3 translation1 translation2 translation3)
        TransformAxis rotation1: coordinates=ankle_angle_l axis=(0.1050135 0.1740224 0.9791263)
            LinearFunction(coefficients=1 0)
    PinJoint subtalar_l: socket_parent_frame=talus_l_offset socket_child_frame=calcn_l_offset
      Coordinate subtalar_angle_l: default_value=0 range=(-0.3490659 0.3490659) clamped=true
      PhysicalOffsetFrame talus_l_offset: socket_parent=/bodyset/talus_l translation=(-0.04877 -0.04195 -0.00792)
          orientation=(1.76819 -0.906223 1.8196)
      PhysicalOffsetFrame calcn_l_offset: socket_parent=/bodyset/calcn_l translation=(0 0 0)
          orientation=(1.76819 -0.906223 1.8196)
    PinJoint mtp_l: socket_parent_frame=calcn_l_offset socket_child_frame=toes_l_offset
      Coordinate mtp_angle_l: default_value=0 range=(-0.5235988 0.5235988) clamped=true locked=true
      PhysicalOffsetFrame calcn_l_offset: socket_parent=/bodyset/calcn_l translation=(0.1788 -0.002 -0.00108)
          orientation=(-3.14159 -0.619901 0)
      PhysicalOffsetFrame toes_l_offset: socket_parent=/bodyset/toes_l translation=(0 0 0)
          orientation=(-3.14159 -0.619901 0)
    CustomJoint L5_S1_IVDjnt: socket_parent_frame=sacrum_offset socket_child_frame=lumbar5_offset
      Coordinate L5_S1_Flex_Ext: default_value=0 range=(-0.1954769 0.06352998) clamped=false
      Coordinate L5_S1_Lat_Bending: default_value=0 range=(-0.03926991 0.03926991) clamped=false
      Coordinate L5_S1_axial_rotation: default_value=0 range=(-0.1759292 0.1759292) clamped=false
      PhysicalOffsetFrame sacrum_offset: socket_parent=/bodyset/sacrum translation=(-0.098 0.071 0)
      PhysicalOffsetFrame lumbar5_offset: socket_parent=/bodyset/lumbar5 translation=(0 0 0)
      SpatialTransform: axes_held_at_zero=(translation1 translation2 translation3)
        TransformAxis rotation1: coordinates=L5_S1_Flex_Ext axis=(0 0 1) LinearFunction(coefficients=1 0)
        TransformAxis rotation2: coordinates=L5_S1_Lat_Bending axis=(1 0 0) LinearFunction(coefficients=1 0)
        TransformAxis rotation3: coordinates=L5_S1_axial_rotation axis=(0 1 0) LinearFunction(coefficients=1 0)
    CustomJoint L4_L5_IVDjnt: socket_parent_frame=lumbar5_offset socket_child_frame=lumbar4_offset
      Coordinate L4_L5_Flex_Ext: default_value=0 range=(-99999.9 99999.9) clamped=false
      Coordinate L4_L5_Lat_Bending: default_value=0 range=(-99999.9 99999.9) clamped=false
      Coordinate L4_L5_axial_rotation: default_value=0 range=(-99999.9 99999.9) clamped=false
      PhysicalOffsetFrame lumbar5_offset: socket_parent=/bodyset/lumbar5 translation=(0.01 0.0296 0)
      PhysicalOffsetFrame lumbar4_offset: socket_parent=/bodyset/lumbar4 translation=(0.001 -0.0025 0)
      SpatialTransform: axes_held_at_zero=(translation1 translation2 translation3)
        TransformAxis rotation1: coordinates=L4_L5_Flex_Ext axis=(0 0 1) LinearFunction(coefficients=1 0)
        TransformAxis rotation2: coordinates=L4_L5_Lat_Bending axis=(1 0 0) LinearFunction(coefficients=1 0)
        TransformAxis rotation3: coordinates=L4_L5_axial_rotation axis=(0 1 0) LinearFunction(coefficients=1 0)
    CustomJoint L3_L4_IVDjnt: socket_parent_frame=lumbar4_offset socket_child_frame=lumbar3_offset
      Coordinate L3_L4_Flex_Ext: default_value=0 range=(-99999.9 99999.9) clamped=false
      Coordinate L3_L4_Lat_Bending: default_value=0 range=(-99999.9 99999.9) clamped=false
      Coordinate L3_L4_axial_rotation: default_value=0 range=(-99999.9 99999.9) clamped=false
      PhysicalOffsetFrame lumbar4_offset: socket_parent=/bodyset/lumbar4 translation=(0 0.032 0)
      PhysicalOffsetFrame lumbar3_offset: socket_parent=/bodyset/lumbar3 translation=(-0.0006 -0.0012 0)
      SpatialTransform: axes_held_at_zero=(translation1 translation2 translation3)
        TransformAxis rotation1: coordinates=L3_L4_Flex_Ext axis=(0 0 1) LinearFunction(coefficients=1 0)
        TransformAxis rotation2: coordinates=L3_L4_Lat_Bending axis=(1 0 0) LinearFunction(coefficients=1 0)
        TransformAxis rotation3: coordinates=L3_L4_axial_rotation axis=(0 1 0) LinearFunction(coefficients=1 0)
    CustomJoint L2_L3_IVD_jnt: socket_parent_frame=lumbar3_offset socket_child_frame=lumbar2_offset
      Coordinate L2_L3_Flex_Ext: default_value=0 range=(-99999.9 99999.9) clamped=false
      Coordinate L2_L3_Lat_Bending: default_value=0 range=(-99999.9 99999.9) clamped=false
      Coordinate L2_L3_axial_rotation: default_value=0 range=(-99999.9 99999.9) clamped=false
      PhysicalOffsetFrame lumbar3_offset: socket_parent=/bodyset/lumbar3 translation=(-0.008 0.0312 0)
      PhysicalOffsetFrame lumbar2_offset: socket_parent=/bodyset/lumbar2 translation=(-0.0013 -0.0039 0)
      SpatialTransform: axes_held_at_zero=(translation1 translation2 translation3)
        TransformAxis rotation1: coordinates=L2_L3_Flex_Ext axis=(0 0 1) LinearFunction(coefficients=1 0)
        TransformAxis rotation2: coordinates=L2_L3_Lat_Bending axis=(1 0 0) LinearFunction(coefficients=1 0)
        TransformAxis rotation3: coordinates=L2_L3_axial_rotation axis=(0 1 0) LinearFunction(coefficients=1 0)
    CustomJoint L1_L2_IVD_jnt: socket_parent_frame=lumbar2_offset socket_child_frame=lumbar1_offset
      Coordinate L1_L2_Flex_Ext: default_value=0 range=(-99999.9 99999.9) clamped=false
      Coordinate L1_L2_Lat_Bending: default_value=0 range=(-99999.9 99999.9) clamped=false
      Coordinate L1_L2_axial_rotation: default_value=0 range=(-99999.9 99999.9) clamped=false
      PhysicalOffsetFrame lumbar2_offset: socket_parent=/bodyset/lumbar2 translation=(-0.01 0.025 0)
      PhysicalOffsetFrame lumbar1_offset: socket_parent=/bodyset/lumbar1 translation=(0.0014 -0.0038 0)
      SpatialTransform: axes_held_at_zero=(translation1 translation2 translation3)
        TransformAxis rotation1: coordinates=L1_L2_Flex_Ext axis=(0 0 1) LinearFunction(coefficients=1 0)
        TransformAxis rotation2: coordinates=L1_L2_Lat_Bending axis=(1 0 0) LinearFunction(coefficients=1 0)
        TransformAxis rotation3: coordinates=L1_L2_axial_rotation axis=(0 1 0) LinearFunction(coefficients=1 0)
    CustomJoint T12_L1_IVDjnt: socket_parent_frame=lumbar1_offset socket_child_frame=thoracic12_offset
      Coordinate T12_L1_FE: default_value=0 range=(-0.2617994 0.2617994) clamped=true
      Coordinate T12_L1_LB: default_value=0 range=(-0.2617994 0.2617994) clamped=true
      Coordinate T12_L1_AR: default_value=0 range=(-0.2617994 0.2617994) clamped=true
      PhysicalOffsetFrame lumbar1_offset: socket_parent=/bodyset/lumbar1 translation=(-0.0104 0.0275 0)
      PhysicalOffsetFrame thoracic12_offset: socket_parent=/bodyset/thoracic12 translation=(-0.0129 0.1154 0)
      SpatialTransform: axes_held_at_zero=(translation1 translation2 translation3)
        TransformAxis rotation1: coordinates=T12_L1_FE axis=(0 0 1) LinearFunction(coefficients=1 0)
        TransformAxis rotation2: coordinates=T12_L1_LB axis=(1 0 0) LinearFunction(coefficients=1 0)
        TransformAxis rotation3: coordinates=T12_L1_AR axis=(0 1 0) LinearFunction(coefficients=1 0)
    CustomJoint T11_T12_IVDjnt: socket_parent_frame=thoracic12_offset socket_child_frame=thoracic11_offset
      Coordinate T11_T12_FE: default_value=0 range=(-0.2617994 0.2617994) clamped=true
      Coordinate T11_T12_LB: default_value=0 range=(-0.2617994 0.2617994) clamped=true locked=true
      Coordinate T11_T12_AR: default_value=0 range=(-0.2617994 0.2617994) clamped=true locked=true
      PhysicalOffsetFrame thoracic12_offset: socket_parent=/bodyset/thoracic12 translation=(0 0.033837 0)
      PhysicalOffsetFrame thoracic11_offset: socket_parent=/bodyset/thoracic11 translation=(0 0 0)
      SpatialTransform: axes_held_at_zero=(translation1 translation2 translation3)
        TransformAxis rotation1: coordinates=T11_T12_FE axis=(0 0 1) LinearFunction(coefficients=1 0)
        TransformAxis rotation2: coordinates=T11_T12_LB axis=(1 0 0) LinearFunction(coefficients=1 0)
        TransformAxis rotation3: coordinates=T11_T12_AR axis=(0 1 0) LinearFunction(coefficients=1 0)
    CustomJoint T10_T11_IVDjnt: socket_parent_frame=thoracic11_offset socket_child_frame=thoracic10_offset
      Coordinate T10_T11_FE: default_value=0 range=(-0.2617994 0.2617994) clamped=true
      Coordinate T10_T11_LB: default_value=0 range=(-0.2617994 0.2617994) clamped=true locked=true
      Coordinate T10_T11_AR: default_value=0 range=(-0.2617994 0.2617994) clamped=true locked=true
      PhysicalOffsetFrame thoracic11_offset: socket_parent=/bodyset/thoracic11 translation=(0 0.029544 0)
      PhysicalOffsetFrame thoracic10_offset: socket_parent=/bodyset/thoracic10 translation=(0 0 0)
      SpatialTransform: axes_held_at_zero=(translation1 translation2 translation3)
        TransformAxis rotation1: coordinates=T10_T11_FE axis=(0 0 1) LinearFunction(coefficients=1 0)
        TransformAxis rotation2: coordinates=T10_T11_LB axis=(1 0 0) LinearFunction(coefficients=1 0)
        TransformAxis rotation3: coordinates=T10_T11_AR axis=(0 1 0) LinearFunction(coefficients=1 0)
    CustomJoint T9_T10_IVDjnt: socket_parent_frame=thoracic10_offset socket_child_frame=thoracic9_offset
      Coordinate T9_T10_FE: default_value=0 range=(-0.2617994 0.2617994) clamped=true
      Coordinate T9_T10_LB: default_value=0 range=(-0.2617994 0.2617994) clamped=true locked=true
      Coordinate T9_T10_AR: default_value=0 range=(-0.2617994 0.2617994) clamped=true locked=true
      PhysicalOffsetFrame thoracic10_offset: socket_parent=/bodyset/thoracic10 translation=(0 0.029 0)
      PhysicalOffsetFrame thoracic9_offset: socket_parent=/bodyset/thoracic9 translation=(0 0 0)
      SpatialTransform: axes_held_at_zero=(translation1 translation2 translation3)
        TransformAxis rotation1: coordinates=T9_T10_FE axis=(0 0 1) LinearFunction(coefficients=1 0)
        TransformAxis rotation2: coordinates=T9_T10_LB axis=(1 0 0) LinearFunction(coefficients=1 0)
        TransformAxis rotation3: coordinates=T9_T10_AR axis=(0 1 0) LinearFunction(coefficients=1 0)
    CustomJoint T8_T9_IVDjnt: socket_parent_frame=thoracic9_offset socket_child_frame=thoracic8_offset
      Coordinate T8_T9_FE: default_value=0 range=(-0.2617994 0.2617994) clamped=true
      Coordinate T8_T9_LB: default_value=0 range=(-0.2617994 0.2617994) clamped=true locked=true
      Coordinate T8_T9_AR: default_value=0 range=(-0.2617994 0.2617994) clamped=true locked=true
      PhysicalOffsetFrame thoracic9_offset: socket_parent=/bodyset/thoracic9 translation=(0 0.025135 0)
      PhysicalOffsetFrame thoracic8_offset: socket_parent=/bodyset/thoracic8 translation=(0 0 0)
      SpatialTransform: axes_held_at_zero=(translation1 translation2 translation3)
        TransformAxis rotation1: coordinates=T8_T9_FE axis=(0 0 1) LinearFunction(coefficients=1 0)
        TransformAxis rotation2: coordinates=T8_T9_LB axis=(1 0 0) LinearFunction(coefficients=1 0)
        TransformAxis rotation3: coordinates=T8_T9_AR axis=(0 1 0) LinearFunction(coefficients=1 0)
    CustomJoint T7_T8_IVDjnt: socket_parent_frame=thoracic8_offset socket_child_frame=thoracic7_offset
      Coordinate T7_T8_FE: default_value=0 range=(-0.2617994 0.2617994) clamped=true
      Coordinate T7_T8_LB: default_value=0 range=(-0.2617994 0.2617994) clamped=true locked=true
      Coordinate T7_T8_AR: default_value=0 range=(-0.2617994 0.2617994) clamped=true locked=true
      PhysicalOffsetFrame thoracic8_offset: socket_parent=/bodyset/thoracic8 translation=(0 0.024615 0)
      PhysicalOffsetFrame thoracic7_offset: socket_parent=/bodyset/thoracic7 translation=(0 0 0)
      SpatialTransform: axes_held_at_zero=(translation1 translation2 translation3)
        TransformAxis rotation1: coordinates=T7_T8_FE axis=(0 0 1) LinearFunction(coefficients=1 0)
        TransformAxis rotation2: coordinates=T7_T8_LB axis=(1 0 0) LinearFunction(coefficients=1 0)
        TransformAxis rotation3: coordinates=T7_T8_AR axis=(0 1 0) LinearFunction(coefficients=1 0)
    CustomJoint T6_T7_IVDjnt: socket_parent_frame=thoracic7_offset socket_child_frame=thoracic6_offset
      Coordinate T6_T7_FE: default_value=0 range=(-0.2617994 0.2617994) clamped=true
      Coordinate T6_T7_LB: default_value=0 range=(-0.2617994 0.2617994) clamped=true locked=true
      Coordinate T6_T7_AR: default_value=0 range=(-0.2617994 0.2617994) clamped=true locked=true
      PhysicalOffsetFrame thoracic7_offset: socket_parent=/bodyset/thoracic7 translation=(0 0.025934 0)
      PhysicalOffsetFrame thoracic6_offset: socket_parent=/bodyset/thoracic6 translation=(0 0 0)
      SpatialTransform: axes_held_at_zero=(translation1 translation2 translation3)
        TransformAxis rotation1: coordinates=T6_T7_FE axis=(0 0 1) LinearFunction(coefficients=1 0)
        TransformAxis rotation2: coordinates=T6_T7_LB axis=(1 0 0) LinearFunction(coefficients=1 0)
        TransformAxis rotation3: coordinates=T6_T7_AR axis=(0 1 0) LinearFunction(coefficients=1 0)
    CustomJoint T5_T6_IVDjnt: socket_parent_frame=thoracic6_offset socket_child_frame=thoracic5_offset
      Coordinate T5_T6_FE: default_value=0 range=(-0.2617994 0.2617994) clamped=true
      Coordinate T5_T6_LB: default_value=0 range=(-0.2617994 0.2617994) clamped=true locked=true
      Coordinate T5_T6_AR: default_value=0 range=(-0.2617994 0.2617994) clamped=true locked=true
      PhysicalOffsetFrame thoracic6_offset: socket_parent=/bodyset/thoracic6 translation=(0 0.025672 0)
      PhysicalOffsetFrame thoracic5_offset: socket_parent=/bodyset/thoracic5 translation=(0 0 0)
      SpatialTransform: axes_held_at_zero=(translation1 translation2 translation3)
        TransformAxis rotation1: coordinates=T5_T6_FE axis=(0 0 1) LinearFunction(coefficients=1 0)
        TransformAxis rotation2: coordinates=T5_T6_LB axis=(1 0 0) LinearFunction(coefficients=1 0)
        TransformAxis rotation3: coordinates=T5_T6_AR axis=(0 1 0) LinearFunction(coefficients=1 0)
    CustomJoint T4_T5_IVDjnt: socket_parent_frame=thoracic5_offset socket_child_frame=thoracic4_offset
      Coordinate T4_T5_FE: default_value=0 range=(-0.2617994 0.2617994) clamped=true
      Coordinate T4_T5_LB: default_value=0 range=(-0.2617994 0.2617994) clamped=true locked=true
      Coordinate T4_T5_AR: default_value=0 range=(-0.2617994 0.2617994) clamped=true locked=true
      PhysicalOffsetFrame thoracic5_offset: socket_parent=/bodyset/thoracic5 translation=(0 0.026267 0)
      PhysicalOffsetFrame thoracic4_offset: socket_parent=/bodyset/thoracic4 translation=(0 0 0)
      SpatialTransform: axes_held_at_zero=(translation1 translation2 translation3)
        TransformAxis rotation1: coordinates=T4_T5_FE axis=(0 0 1) LinearFunction(coefficients=1 0)
        TransformAxis rotation2: coordinates=T4_T5_LB axis=(1 0 0) LinearFunction(coefficients=1 0)
        TransformAxis rotation3: coordinates=T4_T5_AR axis=(0 1 0) LinearFunction(coefficients=1 0)
    CustomJoint T3_T4_IVDjnt: socket_parent_frame=thoracic4_offset socket_child_frame=thoracic3_offset
      Coordinate T3_T4_FE: default_value=0 range=(-0.2617994 0.2617994) clamped=true
      Coordinate T3_T4_LB: default_value=0 range=(-0.2617994 0.2617994) clamped=true locked=true
      Coordinate T3_T4_AR: default_value=0 range=(-0.2617994 0.2617994) clamped=true locked=true
      PhysicalOffsetFrame thoracic4_offset: socket_parent=/bodyset/thoracic4 translation=(0 0.024475 0)
      PhysicalOffsetFrame thoracic3_offset: socket_parent=/bodyset/thoracic3 translation=(0 0 0)
      SpatialTransform: axes_held_at_zero=(translation1 translation2 translation3)
        TransformAxis rotation1: coordinates=T3_T4_FE axis=(0 0 1) LinearFunction(coefficients=1 0)
        TransformAxis rotation2: coordinates=T3_T4_LB axis=(1 0 0) LinearFunction(coefficients=1 0)
        TransformAxis rotation3: coordinates=T3_T4_AR axis=(0 1 0) LinearFunction(coefficients=1 0)
    CustomJoint T2_T3_IVDjnt: socket_parent_frame=thoracic3_offset socket_child_frame=thoracic2_offset
      Coordinate T2_T3_FE: default_value=0 range=(-0.2617994 0.2617994) clamped=true
      Coordinate T2_T3_LB: default_value=0 range=(-0.2617994 0.2617994) clamped=true locked=true
      Coordinate T2_T3_AR: default_value=0 range=(-0.2617994 0.2617994) clamped=true locked=true
      PhysicalOffsetFrame thoracic3_offset: socket_parent=/bodyset/thoracic3 translation=(0 0.02221 0)
      PhysicalOffsetFrame thoracic2_offset: socket_parent=/bodyset/thoracic2 translation=(0 0 0)
      SpatialTransform: axes_held_at_zero=(translation1 translation2 translation3)
        TransformAxis rotation1: coordinates=T2_T3_FE axis=(0 0 1) LinearFunction(coefficients=1 0)
        TransformAxis rotation2: coordinates=T2_T3_LB axis=(1 0 0) LinearFunction(coefficients=1 0)
        TransformAxis rotation3: coordinates=T2_T3_AR axis=(0 1 0) LinearFunction(coefficients=1 0)
    CustomJoint T1_T2_IVDjnt: socket_parent_frame=thoracic2_offset socket_child_frame=thoracic1_offset
      Coordinate T1_T2_FE: default_value=0 range=(-0.2617994 0.2617994) clamped=true
      Coordinate T1_T2_LB: default_value=0 range=(-0.2617994 0.2617994) clamped=true locked=true
      Coordinate T1_T2_AR: default_value=0 range=(-0.2617994 0.2617994) clamped=true locked=true
      PhysicalOffsetFrame thoracic2_offset: socket_parent=/bodyset/thoracic2 translation=(0 0.020271 0)
      PhysicalOffsetFrame thoracic1_offset: socket_parent=/bodyset/thoracic1 translation=(0 0 0)
      SpatialTransform: axes_held_at_zero=(translation1 translation2 translation3)
        TransformAxis rotation1: coordinates=T1_T2_FE axis=(0 0 1) LinearFunction(coefficients=1 0)
        TransformAxis rotation2: coordinates=T1_T2_LB axis=(1 0 0) LinearFunction(coefficients=1 0)
        TransformAxis rotation3: coordinates=T1_T2_AR axis=(0 1 0) LinearFunction(coefficients=1 0)
    CustomJoint Torso_T1_IVD_jnt: socket_parent_frame=thoracic1_offset socket_child_frame=torso_offset
      Coordinate Torso_T1_Flex_Ext: default_value=0 range=(-99999.9 99999.9) clamped=false
      Coordinate Torso_T1_Lat_Bending: default_value=0 range=(-99999.9 99999.9) clamped=false
      Coordinate Torso_T1_axial_rotation: default_value=0 range=(-1.1 1.1) clamped=false
      PhysicalOffsetFrame thoracic1_offset: socket_parent=/bodyset/thoracic1 translation=(-0.00684 0.020271 0)
      PhysicalOffsetFrame torso_offset: socket_parent=/bodyset/torso translation=(-0.0129 0.1154 0)
      SpatialTransform: axes_held_at_zero=(translation1 translation2 translation3)
        TransformAxis rotation1: coordinates=Torso_T1_Flex_Ext axis=(0 0 1) LinearFunction(coefficients=1 0)
        TransformAxis rotation2: coordinates=Torso_T1_Lat_Bending axis=(1 0 0) LinearFunction(coefficients=1 0)
        TransformAxis rotation3: coordinates=Torso_T1_axial_rotation axis=(0 1 0) LinearFunction(coefficients=1 0)
    CustomJoint Abdjnt: socket_parent_frame=sacrum_offset socket_child_frame=Abdomen_offset
      Coordinate Abs_r3: default_value=0 range=(-1.7 1.7) clamped=false
      Coordinate Abs_r2: default_value=0 range=(-1.7 1.7) clamped=false
      Coordinate Abs_r1: default_value=0 range=(-1.7 1.7) clamped=false
      Coordinate Abs_t1: default_value=0 range=(-99999.9 99999.9) clamped=false locked=true
      Coordinate Abs_t2: default_value=0 range=(-99999.9 99999.9) clamped=false locked=true
      PhysicalOffsetFrame sacrum_offset: socket_parent=/bodyset/sacrum translation=(-0.098 0.071 0)
      PhysicalOffsetFrame Abdomen_offset: socket_parent=/bodyset/Abdomen translation=(-0.09 -0.09 0)
      SpatialTransform: axes_held_at_zero=translation3
        TransformAxis rotation1: coordinates=Abs_r3 axis=(0 0 1) LinearFunction(coefficients=1 0)
        TransformAxis rotation2: coordinates=Abs_r2 axis=(1 0 0) LinearFunction(coefficients=1 0)
        TransformAxis rotation3: coordinates=Abs_r1 axis=(0 1 0) LinearFunction(coefficients=1 0)
        TransformAxis translation1: coordinates=Abs_t1 axis=(1 0 0) LinearFunction(coefficients=1 0)
        TransformAxis translation2: coordinates=Abs_t2 axis=(0 1 0) LinearFunction(coefficients=1 0)
    CustomJoint head_torso: socket_parent_frame=torso_offset socket_child_frame=head_offset
      Coordinate neck_flexion: default_value=5.488091e-11 range=(-0.5 0.5) clamped=true
      Coordinate neck_bending: default_value=0 range=(-1.570796 1.570796) clamped=true
      Coordinate neck_rotation: default_value=3.658914e-10 range=(-0.785398 0.785398) clamped=true
      PhysicalOffsetFrame torso_offset: socket_parent=/bodyset/torso translation=(0 0.5414581 0)
      PhysicalOffsetFrame head_offset: socket_parent=/bodyset/head translation=(0 0.541458 0)
      SpatialTransform: axes_held_at_zero=(translation1 translation2 translation3)
        TransformAxis rotation1: coordinates=neck_flexion axis=(0 0 1) LinearFunction(coefficients=1 0)
        TransformAxis rotation2: coordinates=neck_bending axis=(1 0 0) LinearFunction(coefficients=1 0)
        TransformAxis rotation3: coordinates=neck_rotation axis=(0 1 0) LinearFunction(coefficients=1 0)
    CustomJoint acromial_r: socket_parent_frame=torso_offset socket_child_frame=humerus_r_offset
      Coordinate arm_flex_r: default_value=0 range=(-1.570796 1.570796) clamped=false
      Coordinate arm_add_r: default_value=-1.570796 range=(-2.094395 1.570796) clamped=false
      Coordinate arm_rot_r: default_value=0 range=(-1.570796 1.570796) clamped=false
      PhysicalOffsetFrame torso_offset: socket_parent=/bodyset/torso translation=(0.003155 0.3715 0.17)
      PhysicalOffsetFrame humerus_r_offset: socket_parent=/bodyset/humerus_r translation=(0 0 0)
      SpatialTransform: axes_held_at_zero=(translation1 translation2 translation3)
        TransformAxis rotation1: coordinates=arm_flex_r axis=(0 0 1) LinearFunction(coefficients=1 0)
        TransformAxis rotation2: coordinates=arm_add_r axis=(1 0 0) LinearFunction(coefficients=1 0)
        TransformAxis rotation3: coordinates=arm_rot_r axis=(0 1 0) LinearFunction(coefficients=1 0)
    PinJoint elbow_r: socket_parent_frame=humerus_r_offset socket_child_frame=ulna_r_offset
      Coordinate elbow_flex_r: default_value=7.691512e-5 range=(0 2.618) clamped=true
      PhysicalOffsetFrame humerus_r_offset: socket_parent=/bodyset/humerus_r translation=(0.013144 -0.286273 -0.009595)
          orientation=(-0.0228627 0.228018 0.0051689)
      PhysicalOffsetFrame ulna_r_offset: socket_parent=/bodyset/ulna_r translation=(0 0 0)
          orientation=(-0.0228627 0.228018 0.0051689)
    PinJoint radioulnar_r: socket_parent_frame=ulna_r_offset socket_child_frame=radius_r_offset
      Coordinate pro_sup_r: default_value=1.570719 range=(0 1.570796) clamped=true
      PhysicalOffsetFrame ulna_r_offset: socket_parent=/bodyset/ulna_r translation=(-0.006727 -0.013007 0.026083)
          orientation=(-1.56884 0.056428 1.53614)
      PhysicalOffsetFrame radius_r_offset: socket_parent=/bodyset/radius_r translation=(0 0 0)
          orientation=(-1.56884 0.056428 1.53614)
    UniversalJoint radius_hand_r: socket_parent_frame=radius_r_offset socket_child_frame=hand_r_offset
      Coordinate wrist_flex_r: default_value=0 range=(-1.22173 1.22173) clamped=true
      Coordinate wrist_dev_r: default_value=0 range=(-0.4363323 0.6108652) clamped=true
      PhysicalOffsetFrame radius_r_offset: socket_parent=/bodyset/radius_r translation=(-0.008797 -0.235841 0.01361)
          orientation=(-1.5708 0 -1.5708)
      PhysicalOffsetFrame hand_r_offset: socket_parent=/bodyset/hand_r translation=(0 0 0)
          orientation=(-1.5708 0 -1.5708)
    CustomJoint acromial_l: socket_parent_frame=torso_offset socket_child_frame=humerus_l_offset
      Coordinate arm_flex_l: default_value=0 range=(-1.570796 1.570796) clamped=false
      Coordinate arm_add_l: default_value=-1.570796 range=(-2.094395 1.570796) clamped=false
      Coordinate arm_rot_l: default_value=0 range=(-1.570796 1.570796) clamped=false
      PhysicalOffsetFrame torso_offset: socket_parent=/bodyset/torso translation=(0.003155 0.3715 -0.17)
      PhysicalOffsetFrame humerus_l_offset: socket_parent=/bodyset/humerus_l translation=(0 0 0)
      SpatialTransform: axes_held_at_zero=(translation1 translation2 translation3)
        TransformAxis rotation1: coordinates=arm_flex_l axis=(0 0 1) LinearFunction(coefficients=1 0)
        TransformAxis rotation2: coordinates=arm_add_l axis=(-1 0 0) LinearFunction(coefficients=1 0)
        TransformAxis rotation3: coordinates=arm_rot_l axis=(0 -1 0) LinearFunction(coefficients=1 0)
    PinJoint elbow_l: socket_parent_frame=humerus_l_offset socket_child_frame=ulna_l_offset
      Coordinate elbow_flex_l: default_value=7.691512e-5 range=(0 2.618) clamped=true
      PhysicalOffsetFrame humerus_l_offset: socket_parent=/bodyset/humerus_l translation=(0.013144 -0.286273 0.009595)
          orientation=(0.0228627 -0.228018 0.0051689)
      PhysicalOffsetFrame ulna_l_offset: socket_parent=/bodyset/ulna_l translation=(0 0 0)
          orientation=(0.0228627 -0.228018 0.0051689)
    PinJoint radioulnar_l: socket_parent_frame=ulna_l_offset socket_child_frame=radius_l_offset
      Coordinate pro_sup_l: default_value=1.570719 range=(0 1.570796) clamped=true
      PhysicalOffsetFrame ulna_l_offset: socket_parent=/bodyset/ulna_l translation=(-0.006727 -0.013007 -0.026083)
          orientation=(1.56884 -0.056428 1.53614)
      PhysicalOffsetFrame radius_l_offset: socket_parent=/bodyset/radius_l translation=(0 0 0)
          orientation=(1.56884 -0.056428 1.53614)
    UniversalJoint radius_hand_l: socket_parent_frame=radius_l_offset socket_child_frame=hand_l_offset
      Coordinate wrist_flex_l: default_value=0 range=(-1.22173 1.22173) clamped=true
      Coordinate wrist_dev_l: default_value=0 range=(-0.4363323 0.6108652) clamped=true
      PhysicalOffsetFrame radius_l_offset: socket_parent=/bodyset/radius_l translation=(-0.008797 -0.235841 -0.01361)
          orientation=(1.5708 0 1.5708)
      PhysicalOffsetFrame hand_l_offset: socket_parent=/bodyset/hand_l translation=(0 0 0)
          orientation=(1.5708 0 1.5708)
  ConstraintSet:
    CoordinateCouplerConstraint Abs_r3_con: independent_coordinate_names=L5_S1_Flex_Ext
        dependent_coordinate_name=Abs_r3 scale_factor=1
        coupled_coordinates_function=LinearFunction(coefficients=7.1429 0)
    CoordinateCouplerConstraint Abs_r1_con: independent_coordinate_names=L5_S1_axial_rotation
        dependent_coordinate_name=Abs_r1 scale_factor=1
        coupled_coordinates_function=LinearFunction(coefficients=5.5617 0)
    CoordinateCouplerConstraint Abs_r2_con: independent_coordinate_names=L5_S1_Lat_Bending
        dependent_coordinate_name=Abs_r2 scale_factor=1
        coupled_coordinates_function=LinearFunction(coefficients=11.3122 0)
    CoordinateCouplerConstraint L4_L5_Flex_Ext_con: independent_coordinate_names=L5_S1_Flex_Ext
        dependent_coordinate_name=L4_L5_Flex_Ext scale_factor=1
        coupled_coordinates_function=LinearFunction(coefficients=1.8571 0)
    CoordinateCouplerConstraint L4_L5_axial_rotation_con: independent_coordinate_names=L5_S1_axial_rotation
        dependent_coordinate_name=L4_L5_axial_rotation scale_factor=1
        coupled_coordinates_function=LinearFunction(coefficients=1.0625 0)
    CoordinateCouplerConstraint L4_L5_Lat_Bending_con: independent_coordinate_names=L5_S1_Lat_Bending
        dependent_coordinate_name=L4_L5_Lat_Bending scale_factor=1
        coupled_coordinates_function=LinearFunction(coefficients=1.33 0)
    CoordinateCouplerConstraint L3_L4_Flex_Ext_con: independent_coordinate_names=L5_S1_Flex_Ext
        dependent_coordinate_name=L3_L4_Flex_Ext scale_factor=1
        coupled_coordinates_function=LinearFunction(coefficients=1.6429 0)
    CoordinateCouplerConstraint L3_L4_axial_rotation_con: independent_coordinate_names=L5_S1_axial_rotation
        dependent_coordinate_name=L3_L4_axial_rotation scale_factor=1
        coupled_coordinates_function=LinearFunction(coefficients=1.0625 0)
    CoordinateCouplerConstraint L3_L4_Lat_Bending_con: independent_coordinate_names=L5_S1_Lat_Bending
        dependent_coordinate_name=L3_L4_Lat_Bending scale_factor=1
        coupled_coordinates_function=LinearFunction(coefficients=2.4314 0)
    CoordinateCouplerConstraint L2_L3_Flex_Ext_con: independent_coordinate_names=L5_S1_Flex_Ext
        dependent_coordinate_name=L2_L3_Flex_Ext scale_factor=1
        coupled_coordinates_function=LinearFunction(coefficients=1.1429 0)
    CoordinateCouplerConstraint L2_L3_axial_rotation_con: independent_coordinate_names=L5_S1_axial_rotation
        dependent_coordinate_name=L2_L3_axial_rotation scale_factor=1
        coupled_coordinates_function=LinearFunction(coefficients=0.875 0)
    CoordinateCouplerConstraint L2_L3_Lat_Bending_con: independent_coordinate_names=L5_S1_Lat_Bending
        dependent_coordinate_name=L2_L3_Lat_Bending scale_factor=1
        coupled_coordinates_function=LinearFunction(coefficients=2.4314 0)
    CoordinateCouplerConstraint L1_L2_Flex_Ext_con: independent_coordinate_names=L5_S1_Flex_Ext
        dependent_coordinate_name=L1_L2_Flex_Ext scale_factor=1
        coupled_coordinates_function=LinearFunction(coefficients=0.9286 0)
    CoordinateCouplerConstraint L1_L2_axial_rotation_con: independent_coordinate_names=L5_S1_axial_rotation
        dependent_coordinate_name=L1_L2_axial_rotation scale_factor=1
        coupled_coordinates_function=LinearFunction(coefficients=0.8125 0)
    CoordinateCouplerConstraint L1_L2_Lat_Bending_con: independent_coordinate_names=L5_S1_Lat_Bending
        dependent_coordinate_name=L1_L2_Lat_Bending scale_factor=1
        coupled_coordinates_function=LinearFunction(coefficients=2.0392 0)
    CoordinateCouplerConstraint patellofemoral_knee_angle_r_con: independent_coordinate_names=knee_angle_r
        dependent_coordinate_name=knee_angle_r_beta scale_factor=1
        coupled_coordinates_function=LinearFunction(coefficients=1 0)
    CoordinateCouplerConstraint patellofemoral_knee_angle_l_con: independent_coordinate_names=knee_angle_l
        dependent_coordinate_name=knee_angle_l_beta scale_factor=1
        coupled_coordinates_function=LinearFunction(coefficients=1 0)
  MarkerSet:
    Marker Nose: head (0.1076238 0.5429049 0.0001528855) fixed=true
    Marker Head: head (0.06550926 0.6679245 -0.000647531) fixed=true
    Marker Neck: torso (-0.0008130659 0.4468969 0.0001848562) fixed=true
    Marker LShoulder: torso (-0.01275162 0.3663071 -0.2015742) fixed=true
    Marker RShoulder: torso (-0.01275162 0.3663071 0.2015742) fixed=true
    Marker LElbow: humerus_l (0.025 -0.2979545 0.008737653) fixed=true
    Marker RElbow: humerus_r (0.025 -0.2979545 -0.008737653) fixed=true
    Marker LWrist: radius_l (-0.0001735891 -0.235096 -0.009743795) fixed=true
    Marker RWrist: radius_r (-0.0001735891 -0.235096 0.009743795) fixed=true
    Marker Hip: pelvis (-0.0639274 0 0)
    Marker LHip: pelvis (-0.06392744 -0.08134311 -0.1054064) fixed=true
    Marker RHip: pelvis (-0.06392744 -0.08134311 0.1054064) fixed=true
    Marker LKnee: femur_l (-0.005410485 -0.3861322 -0.005110697) fixed=true
    Marker RKnee: femur_r (-0.005410485 -0.3861322 0.005110697) fixed=true
    Marker LAnkle: tibia_l (-0.0002841305 -0.4045061 -0.01495962) fixed=true
    Marker RAnkle: tibia_r (-0.0002841267 -0.4045548 0.01495962) fixed=true
    Marker LBigToe: toes_l (0.0646643 0.009869336 0.01458025) fixed=true
    Marker LSmallToe: toes_l (0.00987419 0.009570326 -0.04479014) fixed=true
    Marker LHeel: calcn_l (0.01567884 0.01249519 0.002348803) fixed=true
    Marker RBigToe: toes_r (0.0646643 0.009869336 -0.01458025) fixed=true
    Marker RSmallToe: toes_r (0.009355228 0.009106171 0.04521489) fixed=true
    Marker RHeel: calcn_r (0.01544572 0.01282707 0.0002817963) fixed=true
    Marker L1: lumbar1 (-0.05904914 0.019 0)
    Marker L2: lumbar2 (-0.057184 0.016 0)
    Marker L3: lumbar3 (-0.0548397 0.021 0)
    Marker L4: lumbar4 (-0.03812979 0.019 0)
    Marker L5: lumbar5 (-0.03060444 0.017 0)
